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f(x) := 2*x^5 + 4*x - 3
polyroots([3; -1.2; -2.5; 1]) = [-1.09545; 1.09545; 2.5]
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x := -2, -1.8 .. -1
x = [-2; -1.8; -1.6; -1.4; -1.2; -1]
f(x) = [-75; -47.9914; -30.3715; -19.3565; -12.7766; -9]
d/dx(f(x)) = [164; 108.976; 69.536; 42.416; 24.736; 14]
d^2/dx^2(f(x)) = [-320; -233.28; -163.84; -109.76; -69.12; -40]
x := 1, 1.2 .. 1.8
d^2/dx^2(f(x)) = [40; 69.12; 109.76; 163.84; 233.28]
x = [1; 1.2; 1.4; 1.6; 1.8]
f(x) = [3; 6.77664; 13.3565; 24.3715; 41.9914]
d/dx(f(x)) = [14; 24.736; 42.416; 69.536; 108.976]
x := 2, 2.2 .. 3
x = [2; 2.2; 2.4; 2.6; 2.8; 3]
f(x) = [69; 108.873; 165.852; 245.028; 352.407; 495]
d/dx(f(x)) = [164; 238.256; 335.776; 460.976; 618.656; 814]
d^2/dx^2(f(x)) = [320; 425.92; 552.96; 703.04; 878.08; 1080]
# Необходимые и достаточные условия существования корней выполняются
# i - счетчик шагов итерации
res(a, b, ε) :=
    i ← 0
    while |a - b| > ε
        c ← (a + b)/2
        i ← i + 1
        a ← c if f(a)*f(c) > 0
        b ← c if f(b)*f(c) > 0
        break if f(c) == 0
    [c; i]
res(-2, -1, 0.0000001) = [-1.5; 1]
polyroots([3; -1.2; -2.5; 1]) = [-1.09545; 1.09545; 2.5]
res(1, 1.8, 0.0000001) = [1.4; 1]
res(2, 3, 0.0000001) = [2.5; 1]
# Нашли 3 корня для данного ε=0,000000 х1=-1.5 на 1 шаге
# х2=1.4 на 1 шаге
# х3=2.5 на 1 шаге
# Вывод: на лабораторной работе я научился решать алгебраические и трансцендентные уравнения в среде MathCad
