# Лабораторная работа №6
# Тема: Итеррационные методы решения систем линейных алгебраических уравнений. Метод простой итерации. Метод
# Цель: Изучить методы программирования матриц
# Выполнил студент группы 316ст
# Волковский Виталий
# Вриант №4
ORIGIN ≡ 1
i := 1 .. 3
j := 1 .. 3
A1 := [7.44, 2.46, 2.74, 3.05; 5.41, 1.25, 2.01, 2.57; 1.15, 3.81, 0.92, -1.15]
F[i] := A1[i, 4]
F = [3.05; 2.57; -1.15]
A[i, j] := A1[i, j]
A = [7.44, 2.46, 2.74; 5.41, 1.25, 2.01; 1.15, 3.81, 0.92]
X := A^-1*F
X = [0.239564; -0.620349; 1.0196]
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j := 1 .. 4
A[1, j] := A1[1, j] - A1[3, j]
A[2, j] := A1[2, j] - A1[1, j]
A[3, j] := (6*A1)[1, j] - (8*A1)[2, j] - (4*A1)[3, j]
A = [6.29, -1.35, 1.82, 4.2; -2.03, -1.21, -0.73, -0.48; -3.24, -10.48, -3.32, 2.34]
A2 := A
A2 = [6.29, -1.35, 1.82, 4.2; -2.03, -1.21, -0.73, -0.48; -3.24, -10.48, -3.32, 2.34]
A3[i, j] := -A2[i, j]/A2[i, i]
A3 = [
    -1, 0.214626, -0.289348, -0.667727;
    -1.67769, -1, -0.603306, -0.396694;
    -0.975904, -3.15663, -1, 0.704819
]
j := 1 .. 4
j := 1 .. 3
F3[i] := -A3[i, 4]
i := 1 .. 3
A3[i, i] := 0
A3 = [
    0, 0.214626, -0.289348, -0.667727;
    -1.67769, 0, -0.603306, -0.396694;
    -0.975904, -3.15663, 0, 0.704819
]
F3 = [0.667727; 0.396694; -0.704819]
sum(|A3[i, j]|, j = 1 .. 3) = [0.503975; 2.28099; 4.13253]
sum(|A3[i, j]|, i = 1 .. 3) = [2.65359; 3.37125; 0.892654]
sum(A3[i, j]^2, i = 1 .. 3) = [3.76702; 10.0104; 0.4477]
# Проверка достаточного условия сходимости метода простой итерации: каждая из трех сумм по модулю <1
res(ε) :=
    k ← 0
    X0 ← F3
    for i ∈ 1 .. 3
        X1[i] ← sum(A3[i, j]*X0[j], j = 1 .. 3) + F3[i]
    while (|X0[1] - X1[1]| > ε) and (|X0[2] - X1[2]| > ε) and (|X0[3] - X1[3]| > ε)
        X0 ← X1
        for i ∈ 1 .. 3
            X1[i] ← sum(A3[i, j]*X0[j], j = 1 .. 3) + F3[i]
        k ← k + 1
    [X1[1]; X1[2]; X1[3]; k]
res(1) = [0.956806; -0.29832; -2.60867; 0]
# Метод Зейделя
res1(ε) :=
    k ← 0
    X0 ← F3
    for i ∈ 1 .. 3
        X1[i] ← sum(A3[i, j]*X0[j], j = 1 .. 3) + F3[i]
    X1[2] ← A3[2, 1]*X1[1] + A3[2, 3]*X0[3] + F3[2]
    X1[3] ← A3[3, 1]*X1[1] + A3[3, 2]*X1[2] + F3[3]
    while (|X0[1] - X1[1]| > ε) and (|X0[2] - X1[2]| > ε) and (|X0[3] - X1[3]| > ε)
        X0 ← X1
        for i ∈ 1 .. 3
            X1[i] ← sum(A3[i, j]*X0[j], j = 1 .. 3) + F3[i]
        X1[2] ← A3[2, 1]*X1[1] + A3[2, 3]*X0[3] + F3[2]
        X1[3] ← A3[3, 1]*X1[1] + A3[3, 2]*X1[2] + F3[3]
        k ← k + 1
    [X1[1]; X1[2]; X1[3]; k]
res1(0.000000001) = [0.239564; -0.620349; 1.0196; 29]
# Вывод: Изучил методы программирования матриц. При помощи метода простой итерации, а также метода Зейделя.
