# Лабораторная работа №9
# Тема: Интерполирование для таблиц с постоянным шагом
# Цель: научиться вычислять конечные разности и значения функции при помощи второй интерполяционной формулы Ньютона и формулы Гаусса.
# Выполнил студент группы 316ст
# Лаворчук Вадим
# Вриант №10
d(y, n) :=
    for i ∈ 0 .. n
        for j ∈ 0 .. n
            d[i, j] ← 0
    for i ∈ 0 .. n
        d[i, 0] ← y[i]
    i ← 1
    while i ≤ n
        for j ∈ n - 1 .. 0
            d[j, i] ← d[j + 1, i - 1] - d[j, i - 1]
            d[n - i + 1, i] ← 0
        i ← i + 1
    d
n := 9
h := 0.1
i := 0 .. n
x[i] := i*h
x = [0; 0.1; 0.2; 0.3; 0.4; 0.5; 0.6; 0.7; 0.8; 0.9]
f(x) := [0.99602; 1.07670; 1.15402; 1.22777; 1.29776; 1.36386; 1.42592; 1.48384; 1.53751; 1.58688]
Δ := d(f(x), n)
Δ = [
    0.99602, 0.08068, -0.00336, -0.00021, 2e-5, 4e-5, -0.00012, 0.00027, -0.00055, 0.00109;
    1.0767, 0.07732, -0.00357, -0.00019, 6e-5, -8e-5, 0.00015, -0.00028, 0.00054, 0;
    1.15402, 0.07375, -0.00376, -0.00013, -2e-5, 7e-5, -0.00013, 0.00026, 0, 0;
    1.22777, 0.06999, -0.00389, -0.00015, 5e-5, -6e-5, 0.00013, 0, 0, 0;
    1.29776, 0.0661, -0.00404, -0.0001, -1e-5, 7e-5, 0, 0, 0, 0;
    1.36386, 0.06206, -0.00414, -0.00011, 6e-5, 0, 0, 0, 0, 0;
    1.42592, 0.05792, -0.00425, -5e-5, 0, 0, 0, 0, 0, 0;
    1.48384, 0.05367, -0.0043, 0, 0, 0, 0, 0, 0, 0;
    1.53751, 0.04937, 0, 0, 0, 0, 0, 0, 0, 0;
    1.58688, 0, 0, 0, 0, 0, 0, 0, 0, 0
]
i := 0 .. n
# Вторая интерполяционная формула Ньютона
y := f(x)
P2(X) := y[n] + sum(Δ[n - i, i]/(i!*h^i)*product(X - x[n - j + 1], j = 1 .. i), i = 1 .. n)
P2(X) collect, X → 3.00374779541*X^9 - 12.1775793651*X^8 + 20.7556216931*X^7 - 19.3090277778*X^6 + 10.6375578704*X^5 - 3.50480902778*X^4 + 0.630113315697*X^3 - 0.223008829365*X^2 + 0.825414325397*X + 0.99602
# вычислили значение точки если она в конце таблицы:
P2(0.89) = 1.58212
P21(X) := y[9] + Δ[8, 1]*(X - x[9])/h + Δ[7, 2]*(X - x[9])*(X - x[8])/(2!*h^2) + Δ[6, 3]*(X - x[9])*(X - x[8])*(X - x[7])/(3!*h^3)
P21(X) := P21(X) + Δ[5, 4]*(X - x[9])*(X - x[8])*(X - x[7])*(X - x[6])/(4!*h^4) + Δ[4, 5]*(X - x[9])*(X - x[8])*(X - x[7])*(X - x[6])*(X - x[5])/(5!*h^5)
P21(X) := P21(X) + Δ[3, 6]*(X - x[9])*(X - x[8])*(X - x[7])*(X - x[6])*(X - x[5])*(X - x[4])/(6!*h^6)
P21(X) := P21(X) + Δ[2, 7]*(X - x[9])*(X - x[8])*(X - x[7])*(X - x[6])*(X - x[5])*(X - x[4])*(X - x[3])/(7!*h^7)
P21(X) := P21(X) + Δ[1, 8]*(X - x[9])*(X - x[8])*(X - x[7])*(X - x[6])*(X - x[5])*(X - x[4])*(X - x[3])*(X - x[2])/(8!*h^8)
P21(X) := P21(X) + Δ[0, 9]*(X - x[9])*(X - x[8])*(X - x[7])*(X - x[6])*(X - x[5])*(X - x[4])*(X - x[3])*(X - x[2])*(X - x[1])/(9!*h^9)
P21(X) collect, X → 3.00374779541*X^9 - 12.1775793651*X^8 + 20.7556216931*X^7 - 19.3090277778*X^6 + 10.6375578704*X^5 - 3.50480902778*X^4 + 0.630113315697*X^3 - 0.223008829365*X^2 + 0.825414325397*X + 0.99602
P21(0.89) = 1.58212
P2(x[i]) = [0.99602; 1.0767; 1.15402; 1.22777; 1.29776; 1.36386; 1.42592; 1.48384; 1.53751; 1.58688]
P21(x[i]) = [0.99602; 1.0767; 1.15402; 1.22777; 1.29776; 1.36386; 1.42592; 1.48384; 1.53751; 1.58688]
# Интерполционная формула Гаусса
k := 5
Gauss(X) := y[k] + sum(Δ[k - trunc(i/2), i]/(i!*h^i)*product(X - x[k - (-1)^j*trunc(j/2)], j = 1 .. i), i = 1 .. n)
Gauss(0.52) = 1.37579
Gauss(X) collect, X → 1.33928571429*X^8 - 4.30555555556*X^7 + 5.32638888889*X^6 - 3.00138888889*X^5 + 0.543368055556*X^4 + 0.173277777778*X^3 - 0.27946765873*X^2 + 0.804721666667*X + 1.01472
# если рассписать сумму и произведение, то получим
Gauss1(X) := y[k] + Δ[5, 1]*(X - x[5])/h + Δ[4, 2]*(X - x[5])*(X - x[6])/(2*h^2) + Δ[4, 3]*(X - x[6])*(X - x[5])*(X - x[4])/(3!*h^3)
Gauss1(X) := Gauss1(X) + Δ[3, 4]*(X - x[7])*(X - x[6])*(X - x[5])*(X - x[4])/(4!*h^4)
Gauss1(X) := Gauss1(X) + Δ[3, 5]*(X - x[7])*(X - x[6])*(X - x[5])*(X - x[4])*(X - x[3])/(5!*h^5)
Gauss1(X) := Gauss1(X) + Δ[2, 6]*(X - x[8])*(X - x[7])*(X - x[6])*(X - x[5])*(X - x[4])*(X - x[3])/(6!*h^6)
Gauss1(X) := Gauss1(X) + Δ[2, 7]*(X - x[8])*(X - x[7])*(X - x[6])*(X - x[5])*(X - x[4])*(X - x[3])*(X - x[2])/(7!*h^7)
Gauss1(X) := Gauss1(X) + Δ[1, 8]*(X - x[9])*(X - x[8])*(X - x[7])*(X - x[6])*(X - x[5])*(X - x[4])*(X - x[3])*(X - x[2])/(8!*h^8)
Gauss(0.52) = 1.37579
Gauss1(0.52) = 1.3766
Gauss1(X) collect, X → 1.33928571429*X^8 - 5.37698412698*X^7 + 9.07638888889*X^6 - 8.36805555556*X^5 + 4.58503472222*X^4 - 1.54363888889*X^3 + 0.129240674603*X^2 + 0.794578571429*X + 0.99711
Gauss(X) collect, X → 1.33928571429*X^8 - 4.30555555556*X^7 + 5.32638888889*X^6 - 3.00138888889*X^5 + 0.543368055556*X^4 + 0.173277777778*X^3 - 0.27946765873*X^2 + 0.804721666667*X + 1.01472
Gauss(x[i]) = [1.01472; 1.0926; 1.16607; 1.2358; 1.3018; 1.36386; 1.42188; 1.47581; 1.52546; 1.57098]
Gauss1(x[i]) = [0.99711; 1.0767; 1.15402; 1.22777; 1.29776; 1.36386; 1.42592; 1.48384; 1.53751; 1.58688]
f(x) = [0.99602; 1.0767; 1.15402; 1.22777; 1.29776; 1.36386; 1.42592; 1.48384; 1.53751; 1.58688]
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# вывод : в данной лабораторной работе научился вычислять промежуточные значения функции при помощи второй формулы Ньютона и формулы Гаусса
