# Лабораторная работа №10
# Решение алгебраических и трансцендентных уравнений комбинированным методом
# Цель: научится решать алгебраические и трансцендентные уравнения методом хорд, касательных и комбинированным методом.
# Вариант №4  Группа 316ст
# Лаворчук В.И.
F(x) := 2*x^3 + 6*x - 17
x := 1, 1.2 .. 2
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F1(x) := d/dx(F(x))
F2(x) := d/dx(F1(x))
x = [1; 1.2; 1.4; 1.6; 1.8; 2]
F(x) = [-9; -6.344; -3.112; 0.792; 5.464; 11]
F1(x) = [12; 14.64; 17.76; 21.36; 25.44; 30]
F2(x) = [12; 14.4; 16.8; 19.2; 21.6; 24]
hord(F, a, b, ε) :=
    i ← 0
    b1 ← b - F(b)*(b - a)/(F(b) - F(a))
    while |b1 - b| > ε or |F(b1)| > ε
        b ← b1
        b1 ← b - F(b)*(b - a)/(F(b) - F(a))
        i ← i + 1
    [b1; i]
kasat(F, a, b, ε) :=
    i ← 0
    if F(a)*d^2/da^2(F(a) > 0)
        b0 ← a
        a0 ← b
    otherwise
        a0 ← a
        b0 ← b
    b1 ← b0 - F(b0)/d/db0(F(b0))
    while |b1 - b0| > ε
        b0 ← b1
        b1 ← b0 - F(b0)/d/db0(F(b0))
        i ← i + 1
    [b1; i]
komb(a, b, ε) :=
    i ← 0
    if F(a)*F2(a) > 0
        b0 ← a
        a0 ← b
    otherwise
        a0 ← a
        b0 ← b
    a1 ← a
    b1 ← b
    while |b1 - a1| > 2*ε
        Δa ← F(a0)*(b0 - a0)/(F(b0) - F(a0))
        Δb ← F(b0)/F1(b0)
        a1 ← a0 - Δa
        b1 ← b0 - Δb
        if F(a1)*F2(a1) > 0
            b0 ← a1
            a0 ← b1
        otherwise
            a0 ← a1
            b0 ← b1
        i ← i + 1
    [(a1 + b1)/2; i]
polyroots([-17; 6; 0; 2]) = [-0.781144 - 2.19785i; -0.781144 + 2.19785i; 1.56229]
a := 1
b := 2
hord(F, a, b, 0.000001) = [1.56229; 12]
kasat(F, a, b, 0.000001) = [1.56229; 4]
komb(a, b, 0.000001) = [1.56229; 4]
F(1.562287) = -3.16062e-6
# Вывод:  на лабораторной работе я научился решать алгебраические и трансцендентные уравнения методом хорд, касательных и комбинированным. комбинированный метод самый быстрый.
