# Лабораторная работа №6
# Тема: Итеррационные методы решения систем линейных алгебраических уравнений. Метод простой итерации.
# Цель: Изучить методы программирования матриц
# Выполнил студент группы 316ст
# Бедрицкий Илья
# Вриант №2
ORIGIN ≡ 1
i := 1 .. 3
j := 1 .. 3
A1 := [5.96, 1.40, 5.03, 7.41; 2.99, 1.25, 0.38, 4.48; 1.05, 3.57, 1.92, 15.1]
F[i] := A1[i, 4]
F = [7.41; 4.48; 15.1]
A[i, j] := A1[i, j]
A = [5.96, 1.4, 5.03; 2.99, 1.25, 0.38; 1.05, 3.57, 1.92]
X := A^-1*F
X = [-0.235018; 3.94769; 0.652871]
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j := 1 .. 4
A[1, j] := A1[1, j] + A1[2, j]
A[2, j] := A1[3, j]
A[3, j] := A1[1, j] - A1[2, j]
A = [8.95, 2.65, 5.41, 11.89; 1.05, 3.57, 1.92, 15.1; 2.97, 0.15, 4.65, 2.93]
A2 := A
A2 = [8.95, 2.65, 5.41, 11.89; 1.05, 3.57, 1.92, 15.1; 2.97, 0.15, 4.65, 2.93]
j := 1 .. 4
A3[i, j] := -A2[i, j]/A2[i, i]
A3 = [
    -1, -0.296089, -0.604469, -1.32849;
    -0.294118, -1, -0.537815, -4.22969;
    -0.63871, -0.0322581, -1, -0.630108
]
j := 1 .. 3
F3[i] := -A3[i, 4]
i := 1 .. 3
A3[i, i] := 0
A3 = [
    0, -0.296089, -0.604469, -1.32849;
    -0.294118, 0, -0.537815, -4.22969;
    -0.63871, -0.0322581, 0, -0.630108
]
F3 = [1.32849; 4.22969; 0.630108]
sum(|A3[i, j]|, j = 1 .. 3) = [0.900559; 0.831933; 0.670968]
sum(|A3[i, j]|, i = 1 .. 3) = [0.932827; 0.328347; 1.14228]
sum(A3[i, j]^2, i = 1 .. 3) = [0.494455; 0.0887095; 0.654628]
# Проверка достаточного условия сходимости метода простой итерации: каждая из трех сумм по модулю <1
res(ε) :=
    k ← 0
    X0 ← F3
    for i ∈ 1 .. 3
        X1[i] ← sum(A3[i, j]*X0[j], j = 1 .. 3) + F3[i]
    while (|X0[1] - X1[1]| > ε) and (|X0[2] - X1[2]| > ε) and (|X0[3] - X1[3]| > ε)
        X0 ← X1
        for i ∈ 1 .. 3
            X1[i] ← sum(A3[i, j]*X0[j], j = 1 .. 3) + F3[i]
        k ← k + 1
    [X1[1]; X1[2]; X1[3]; k]
res(0.000000001) = [-0.235018; 3.94769; 0.652871; 89]
# Метод Зейделя
res1(ε) :=
    k ← 0
    X0 ← F3
    for i ∈ 1 .. 3
        X1[i] ← sum(A3[i, j]*X0[j], j = 1 .. 3) + F3[i]
    X1[2] ← A3[2, 1]*X1[1] + A3[2, 3]*X0[3] + F3[2]
    X1[3] ← A3[3, 1]*X1[1] + A3[3, 2]*X1[2] + F3[3]
    while (|X0[1] - X1[1]| > ε) and (|X0[2] - X1[2]| > ε) and (|X0[3] - X1[3]| > ε)
        X0 ← X1
        for i ∈ 1 .. 3
            X1[i] ← sum(A3[i, j]*X0[j], j = 1 .. 3) + F3[i]
        X1[2] ← A3[2, 1]*X1[1] + A3[2, 3]*X0[3] + F3[2]
        X1[3] ← A3[3, 1]*X1[1] + A3[3, 2]*X1[2] + F3[3]
        k ← k + 1
    [X1[1]; X1[2]; X1[3]; k]
res1(0.000000001) = [-0.235018; 3.94769; 0.652871; 15]
# Вывод: Изучил методы программирования матриц. При помощи метода простой итерации, а также метода Зейделя.
