# Лабораторная работа №8
# Тема: Интерполирование для таблиц с постоянным шагом.
# Цель: Научиться вычислять конечные разности при помощи первой интерполяционной
# формулы Ньютона.
# Выполнил студент группы 316ст
# Бедрицкий Илья
# Вриант №2
d(y, n) :=
    for i ∈ 0 .. n
        for j ∈ 0 .. n
            d[i, j] ← 0
    for i ∈ 0 .. n
        d[i, 0] ← y[i]
    i ← 1
    while i ≤ n
        for j ∈ n - 1 .. 0
            d[j, i] ← d[j + 1, i - 1] - d[j, i - 1]
            d[n - i + 1, i] ← 0
        i ← i + 1
    d
n1 := 9
h := 0.1
i := 0 .. n1
x[i] := i*h
x = [0; 0.1; 0.2; 0.3; 0.4; 0.5; 0.6; 0.7; 0.8; 0.9]
f1 := [0.96285; 1.04482; 1.12385; 1.12871; 1.27023; 1.33790; 1.40159; 1.46117; 1.51655; 1.56760]
Δ := d(f1, n1)
Δ = [
    0.96285, 0.08197, -0.00294, -0.07123, 0.28206, -0.7034, 1.40512, -2.45722, 3.92974, -5.8928;
    1.04482, 0.07903, -0.07417, 0.21083, -0.42134, 0.70172, -1.0521, 1.47252, -1.96306, 0;
    1.12385, 0.00486, 0.13666, -0.21051, 0.28038, -0.35038, 0.42042, -0.49054, 0, 0;
    1.12871, 0.14152, -0.07385, 0.06987, -0.07, 0.07004, -0.07012, 0, 0, 0;
    1.27023, 0.06767, -0.00398, -0.00013, 4e-5, -8e-5, 0, 0, 0, 0;
    1.3379, 0.06369, -0.00411, -9e-5, -4e-5, 0, 0, 0, 0, 0;
    1.40159, 0.05958, -0.0042, -0.00013, 0, 0, 0, 0, 0, 0;
    1.46117, 0.05538, -0.00433, 0, 0, 0, 0, 0, 0, 0;
    1.51655, 0.05105, 0, 0, 0, 0, 0, 0, 0, 0;
    1.5676, 0, 0, 0, 0, 0, 0, 0, 0, 0
]
P1(X) := f1[0] + sum(Δ[0, i]/(i!*h^i)*product(X - x[j], j = 0 .. i - 1), i = 1 .. n1)
P1(X) collect, X → 68206.6964286*X^8 - 16238.9770723*X^9 - 120830.112434*X^7 + 117233.3125*X^6 - 67603.2962963*X^5 + 23469.5169792*X^4 - 4716.52330269*X^3 + 490.444792262*X^2 - 18.8268948413*X + 0.96285
P11(X) := f1[0] + Δ[0, 1]*(X - x[0])/h + Δ[0, 2]*(X - x[0])*(X - x[1])/(2*h^2) + Δ[0, 3]*(X - x[0])*(X - x[1])*(X - x[2])/(3!*h^3)
P11(X) := P11(X) + Δ[0, 4]*(X - x[0])*(X - x[1])*(X - x[2])*(X - x[3])/(4!*h^4) + Δ[0, 5]*(X - x[0])*(X - x[1])*(X - x[2])*(X - x[3])*(X - x[4])/(5!*h^5)
P11(X) := P11(X) + Δ[0, 6]*(X - x[0])*(X - x[1])*(X - x[2])*(X - x[3])*(X - x[4])*(X - x[5])/(6!*h^6)
P11(X) := P11(X) + Δ[0, 7]*(X - x[0])*(X - x[1])*(X - x[2])*(X - x[3])*(X - x[4])*(X - x[5])*(X - x[6])/(7!*h^7)
P11(X) := P11(X) + Δ[0, 8]*(X - x[0])*(X - x[1])*(X - x[2])*(X - x[3])*(X - x[4])*(X - x[5])*(X - x[6])*(X - x[7])/(8!*h^8)
P11(X) := P11(X) + Δ[0, 9]*(X - x[0])*(X - x[1])*(X - x[2])*(X - x[3])*(X - x[4])*(X - x[5])*(X - x[6])*(X - x[7])*(X - x[8])/(9!*h^9)
P12(X) := P11(X) + Δ[0, 10]*(X - x[0])*(X - x[1])*(X - x[2])*(X - x[3])*(X - x[4])*(X - x[5])*(X - x[6])*(X - x[7])*(X - x[8])*(X - x[9])/(10!*h^10)
i := 0 .. n1
P1(x[i]) = [0.96285; 1.04482; 1.12385; 1.12871; 1.27023; 1.3379; 1.40159; 1.46117; 1.51655; 1.5676]
# Применяю форулу для вычисления, если точка в начале таблицы
P1(0.12) = 1.10994
# Вывод: Научился вычислять конечные разности при помощи первой интерполяционной формулы Ньютона.
