# Лабораторная работа №9
# Тема: Интерполирование для таблиц с постоянным шагом
# Цель: научиться вычислять конечные разности и значения функции при помощи второй интерполяционной формулы Ньютона и формулы Гаусса.
# Выполнил студент группы 316ст
# Сычевой Кирилл
# Вриант №19
d(y, n) :=
    for i ∈ 0 .. n
        for j ∈ 0 .. n
            d[i, j] ← 0
    for i ∈ 0 .. n
        d[i, 0] ← y[i]
    i ← 1
    while i ≤ n
        for j ∈ n - 1 .. 0
            d[j, i] ← d[j + 1, i - 1] - d[j, i - 1]
            d[n - i + 1, i] ← 0
        i ← i + 1
    d
n := 9
h := 0.1
i := 0 .. n
x[i] := i*h
x = [0; 0.1; 0.2; 0.3; 0.4; 0.5; 0.6; 0.7; 0.8; 0.9]
f(x) := [1.01242; 1.09244; 1.16906; 1.24207; 1.31130; 1.37660; 1.43784; 1.49491; 1.54772; 1.59623]
Δ := d(f(x), n)
Δ = [
    1.01242, 0.08002, -0.0034, -0.00021, 4e-5, -2e-5, 2e-5, -2e-5, 2e-5, 1e-5;
    1.09244, 0.07662, -0.00361, -0.00017, 2e-5, 0, 0, 0, 3e-5, 0;
    1.16906, 0.07301, -0.00378, -0.00015, 2e-5, 0, 0, 3e-5, 0, 0;
    1.24207, 0.06923, -0.00393, -0.00013, 2e-5, 0, 3e-5, 0, 0, 0;
    1.3113, 0.0653, -0.00406, -0.00011, 2e-5, 3e-5, 0, 0, 0, 0;
    1.3766, 0.06124, -0.00417, -9e-5, 5e-5, 0, 0, 0, 0, 0;
    1.43784, 0.05707, -0.00426, -4e-5, 0, 0, 0, 0, 0, 0;
    1.49491, 0.05281, -0.0043, 0, 0, 0, 0, 0, 0, 0;
    1.54772, 0.04851, 0, 0, 0, 0, 0, 0, 0, 0;
    1.59623, 0, 0, 0, 0, 0, 0, 0, 0, 0
]
i := 0 .. n
# Вторая интерполяционная формула Ньютона
y := f(x)
P2(X) := y[n] + sum(Δ[n - i, i]/(i!*h^i)*product(X - x[n - j + 1], j = 1 .. i), i = 1 .. n)
P2(X) collect, X → 0.027557319224*X^9 - 0.0496031746032*X^8 - 0.0281084656085*X^7 + 0.145833333333*X^6 - 0.163136574074*X^5 + 0.101145833333*X^4 - 0.0667864858907*X^3 - 0.155025992063*X^2 + 0.816284206349*X + 1.01242
# вычислили значение точки если она в конце таблицы:
P2(0.88) = 1.58687
P21(X) := y[9] + Δ[8, 1]*(X - x[9])/h + Δ[7, 2]*(X - x[9])*(X - x[8])/(2!*h^2) + Δ[6, 3]*(X - x[9])*(X - x[8])*(X - x[7])/(3!*h^3)
P21(X) := P21(X) + Δ[5, 4]*(X - x[9])*(X - x[8])*(X - x[7])*(X - x[6])/(4!*h^4) + Δ[4, 5]*(X - x[9])*(X - x[8])*(X - x[7])*(X - x[6])*(X - x[5])/(5!*h^5)
P21(X) := P21(X) + Δ[3, 6]*(X - x[9])*(X - x[8])*(X - x[7])*(X - x[6])*(X - x[5])*(X - x[4])/(6!*h^6)
P21(X) := P21(X) + Δ[2, 7]*(X - x[9])*(X - x[8])*(X - x[7])*(X - x[6])*(X - x[5])*(X - x[4])*(X - x[3])/(7!*h^7)
P21(X) := P21(X) + Δ[1, 8]*(X - x[9])*(X - x[8])*(X - x[7])*(X - x[6])*(X - x[5])*(X - x[4])*(X - x[3])*(X - x[2])/(8!*h^8)
P21(X) := P21(X) + Δ[0, 9]*(X - x[9])*(X - x[8])*(X - x[7])*(X - x[6])*(X - x[5])*(X - x[4])*(X - x[3])*(X - x[2])*(X - x[1])/(9!*h^9)
P21(X) collect, X → 0.027557319224*X^9 - 0.0496031746032*X^8 - 0.0281084656085*X^7 + 0.145833333333*X^6 - 0.163136574074*X^5 + 0.101145833333*X^4 - 0.0667864858907*X^3 - 0.155025992063*X^2 + 0.816284206349*X + 1.01242
P21(0.88) = 1.58687
P2(x[i]) = [1.01242; 1.09244; 1.16906; 1.24207; 1.3113; 1.3766; 1.43784; 1.49491; 1.54772; 1.59623]
P21(x[i]) = [1.01242; 1.09244; 1.16906; 1.24207; 1.3113; 1.3766; 1.43784; 1.49491; 1.54772; 1.59623]
# Интерполционная формула Гаусса
k := 5
Gauss(X) := y[k] + sum(Δ[k - trunc(i/2), i]/(i!*h^i)*product(X - x[k - (-1)^j*trunc(j/2)], j = 1 .. i), i = 1 .. n)
Gauss(0.45) = 1.34648
Gauss(X) collect, X → 0.0744047619048*X^8 - 0.208333333333*X^7 + 0.197916666667*X^6 - 0.0333333333333*X^5 - 0.06421875*X^4 + 0.0262708333333*X^3 - 0.185877678571*X^2 + 0.781990833333*X + 1.03209
# если рассписать сумму и произведение, то получим
Gauss1(X) := y[k] + Δ[5, 1]*(X - x[5])/h + Δ[4, 2]*(X - x[5])*(X - x[6])/(2*h^2) + Δ[4, 3]*(X - x[6])*(X - x[5])*(X - x[4])/(3!*h^3)
Gauss1(X) := Gauss1(X) + Δ[3, 4]*(X - x[7])*(X - x[6])*(X - x[5])*(X - x[4])/(4!*h^4)
Gauss1(X) := Gauss1(X) + Δ[3, 5]*(X - x[7])*(X - x[6])*(X - x[5])*(X - x[4])*(X - x[3])/(5!*h^5)
Gauss1(X) := Gauss1(X) + Δ[2, 6]*(X - x[8])*(X - x[7])*(X - x[6])*(X - x[5])*(X - x[4])*(X - x[3])/(6!*h^6)
Gauss1(X) := Gauss1(X) + Δ[2, 7]*(X - x[8])*(X - x[7])*(X - x[6])*(X - x[5])*(X - x[4])*(X - x[3])*(X - x[2])/(7!*h^7)
Gauss1(X) := Gauss1(X) + Δ[1, 8]*(X - x[9])*(X - x[8])*(X - x[7])*(X - x[6])*(X - x[5])*(X - x[4])*(X - x[3])*(X - x[2])/(8!*h^8)
Gauss(0.46) = 1.35259
Gauss1(0.46) = 1.35096
Gauss1(X) collect, X → 0.0744047619048*X^8 - 0.267857142857*X^7 + 0.40625*X^6 - 0.3375*X^5 + 0.175364583333*X^4 - 0.0867291666667*X^3 - 0.151794345238*X^2 + 0.816001309524*X + 1.01243
Gauss(X) collect, X → 0.0744047619048*X^8 - 0.208333333333*X^7 + 0.197916666667*X^6 - 0.0333333333333*X^5 - 0.06421875*X^4 + 0.0262708333333*X^3 - 0.185877678571*X^2 + 0.781990833333*X + 1.03209
Gauss(x[i]) = [1.03209; 1.10845; 1.18116; 1.25017; 1.31536; 1.3766; 1.43378; 1.48681; 1.53562; 1.58022]
Gauss1(x[i]) = [1.01243; 1.09244; 1.16906; 1.24207; 1.3113; 1.3766; 1.43784; 1.49491; 1.54772; 1.59623]
f(x) = [1.01242; 1.09244; 1.16906; 1.24207; 1.3113; 1.3766; 1.43784; 1.49491; 1.54772; 1.59623]
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# вывод : в данной лабораторной работе научился вычислять промежуточные значения функции при помощи второй формулы Ньютона и формулы Гаусса
