# Лабораторная работа №2
# Решение алгебраических и трансцедентных уравнений методом
# половинного деления.
# Светличного Дмитрия
# Группа 317ст
polyroots([13; 8; 0; 1]) = [-1.33055; 0.665277 + 3.05414i; 0.665277 - 3.05414i]
f(x) := x^3 + 8*x + 13
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x := -3, -2.8 .. 0
d/dx(f(x)) = [35; 31.52; 28.28; 25.28; 22.52; 20; 17.72; 15.68; 13.88; 12.32; 11; 9.92; 9.08; 8.48; 8.12; 1.86939]
d^2/dx^2(f(x)) = [-18; -16.8; -15.6; -14.4; -13.2; -12; -10.8; -9.6; -8.4; -7.2; -6; -4.8; -3.6; -2.4; -1.2; 0]
x = [-3; -2.8; -2.6; -2.4; -2.2; -2; -1.8; -1.6; -1.4; -1.2; -1; -0.8; -0.6; -0.4; -0.2; 0]
f(x) = [-38; -31.352; -25.376; -20.024; -15.248; -11; -7.232; -3.896; -0.944; 1.672; 4; 6.088; 7.984; 9.736; 11.392; 13]
res(a, b, ξ) :=
    i ← 0
    while |a - b| > ξ
        c ← (a + b)/2
        i ← i + 1
        a ← c if f(a)*f(c) > 0
        b ← c if f(b)*f(c) > 0
        break if f(c) == 0
    [c; i]
res(-3, 0, 0.0000001) = [-1.33055; 25]
# Вывод. После выполненной лаюораторной работы я научилась решать уравнения матодом половинного деления средствами MathCad. Нашла один корень для ξ=0.0000001, x=-1.331. Нашла на 25 шаге.
