# Лабораторная работа по Mathcad №4
# Тема: Решение алгебраических и трансцендентных уравнений методом касательных, хорд и комбинированным.
# Цель: Научиться решать алгебраические и трансцендентные уравнения методом касательных, хорд и комбинированным с помощью Mathcad.
# Выполнила студентка группы 316ст
# Ганюшкина Ярина
# Вариант №2
# Ход работы
F(x) := x^3 + 8*x + 13
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polyroots([13; 8; 0; 1]) = [-1.33055; 0.665277 + 3.05414i; 0.665277 - 3.05414i]
F1(x) := d/dx(F(x))
F2(x) := d/dx(F1(x))
x := -2, -1.9 .. -1
F2(x) = [-12; -11.4; -10.8; -10.2; -9.6; -9; -8.4; -7.8; -7.2; -6.6; -6]
x = [-2; -1.9; -1.8; -1.7; -1.6; -1.5; -1.4; -1.3; -1.2; -1.1; -1]
F(x) = [-11; -9.059; -7.232; -5.513; -3.896; -2.375; -0.944; 0.403; 1.672; 2.869; 4]
F1(x) = [20; 18.83; 17.72; 16.67; 15.68; 14.75; 13.88; 13.07; 12.32; 11.63; 11]
# Метод Хорд
hord(F, a, b, ε) :=
    i ← 0
    b1 ← b - F(b)*(b - a)/(F(b) - F(a))
    while |b1 - b| > ε or |F(b1)| > ε
        b ← b1
        b1 ← b - F(b)*(b - a)/(F(b) - F(a))
        i ← i + 1
    [b1; i]
# Метод касательных
kasat(F, a, b, ε) :=
    i ← 0
    if (F(a)*d^2/da^2(F(a))) > 0
        b0 ← a
        a0 ← b
    otherwise
        a0 ← a
        b0 ← b
    b1 ← b0 - F(b0)/d/db0(F(b0))
    while |b1 - b0| > ε
        b0 ← b1
        b1 ← b1 - F(b0)/d/db0(F(b0))
        i ← i + 1
    [b1; i]
# Комбинированный метод
komb(a, b, ε) :=
    i ← 0
    if F(a)*F2(a) > 0
        b0 ← a
        a0 ← b
    otherwise
        a0 ← a
        b0 ← b
    a1 ← a
    b1 ← b
    while |b1 - a1| > 2*ε
        Δa ← F(a0)*(b0 - a0)/(F(b0) - F(a0))
        Δb ← F(b0)/F1(b0)
        a1 ← a0 - Δa
        b1 ← b0 - Δb
        if F(a1)*F2(a1) > 0
            b0 ← a1
            a0 ← b1
        otherwise
            a0 ← a1
            b0 ← b1
        i ← i + 1
    [(a1 + b1)/2; i]
a := -2
b := -1
hord(F, a, b, 0.000001) = [-1.33055; 9]
kasat(F, a, b, 0.000001) = [-1.33055; 4]
komb(a, b, 0.000001) = [-1.33055; 4]
# Ответ: Корень x=-1.331 найден на 15, и на 4-ых шагах вычисления
# После подстановки в уравнение:
F(-1.331) = -0.00594769
# Вывод: На данной лабораторной работе я закрепил теоретические знания, а также приобрел практические навыки решения алгебраических и трансцендентных уравнений методом хорд, касательной и комбинированным с помощью MathCad.
