# Лабораторная работа №5
# Тема: Решение систем линейных уравнений. Метод Гаусса
# Метод единственного деления
# Цель: решить систему линейных уравнений методом Гаусса.
# Вычислить определитель матрицы и коэффициенты
# Выполнила студентка группы 316ст
# Ганюшкина Ярина
# Вриант №5
det([2.00, 2.60, 1.93; 3.45, 0.58, 1.21; 1.25, 4.21, 1.95]) = 5.14783  # не равен нулю
ORIGIN ≡ 1
Gauss(a, n, m) :=
    i ← 1
    while i ≤ n
        j ← 1
        koef ← a[i, i]
        while j ≤ m
            a[i, j] ← a[i, j]/koef
            j ← j + 1
        j ← i + 1
        while j ≤ n
            koef ← a[j, i]
            k ← 1
            while k ≤ m
                a[j, k] ← a[j, k] - a[i, k]*koef
                k ← k + 1
            j ← j + 1
        i ← i + 1
    x ← [0; 0; 0]
    for i ∈ n .. 1
        x[i] ← a[i, m] - sum(a[i, j]*x[j], j = m - 2 .. n)
    x
a := [2.00, 2.60, 1.93, 2.15; 3.45, 0.58, 1.21, 1.55; 1.25, 4.21, 1.95, 2.10]
Gauss(a, 3, 4) = [0.0914773; -0.00112183; 1.02071]
x := [2.00, 2.60, 1.93; 3.45, 0.58, 1.21; 1.25, 4.21, 1.95]^-1*[2.15; 1.55; 2.10] = [0.0914773; -0.00112183; 1.02071]
[2.00, 2.60, 1.93; 3.45, 0.58, 1.21; 1.25, 4.21, 1.95]^-1 = [-0.769858, 0.593512, 0.39368; -1.01305, 0.288956, 0.823356; 2.68064, -1.00431, -1.51714]
[2.00, 2.60, 1.93; 3.45, 0.58, 1.21; 1.25, 4.21, 1.95]^-1*[2.00, 2.60, 1.93; 3.45, 0.58, 1.21; 1.25, 4.21, 1.95] = [1, 0, 0; 0, 1, 0; 0, 0, 1]
# Вывод: во время выполнения данной лабораторной работы я научился решать системы линейных урвнений методом Гауса. Нашел корени: [0.091; -1.122*10^-3; 1.021]
