ORIGIN ≡ 1
A1 := [1.36, 3, 3.37, 5.06; 2.35, -1.48, 1.02, 6.87; 4.26, 2.45, -1.96, -1.91]
i := 1 .. 3
F[i] := A1[i, 4]
F = [5.06; 6.87; -1.91]
j := 1 .. 3
A[i, j] := A1[i, j]
A = [1.36, 3, 3.37; 2.35, -1.48, 1.02; 4.26, 2.45, -1.96]
X := A^-1*F
X = [1.23115; -1.2362; 2.10511]
A*X = [5.06; 6.87; -1.91]
j := 1 .. 4
A[1, j] := A1[2, j] + A1[3, j]
A[2, j] := A1[2, j] - A1[1, j]
A[3, j] := A1[3, j] - A1[1, j]
A = [6.61, 0.97, -0.94, 4.96; 0.99, -4.48, -2.35, 1.81; 2.9, -0.55, -5.33, -6.97]
A2 := A
A2 = [6.61, 0.97, -0.94, 4.96; 0.99, -4.48, -2.35, 1.81; 2.9, -0.55, -5.33, -6.97]
j := 1 .. 4
A3[i, j] := -A2[i, j]/A2[i, i]
A3 = [
    -1, -0.146747, 0.142209, -0.750378;
    0.220982, -1, -0.524554, 0.404018;
    0.54409, -0.103189, -1, -1.30769
]
i := 1 .. 3
j := 1 .. 3
A3[i, i] := 0
A3 = [
    0, -0.146747, 0.142209, -0.750378;
    0.220982, 0, -0.524554, 0.404018;
    0.54409, -0.103189, 0, -1.30769
]
i := 1 .. 3
j := 1 .. 3
sum(|A3[i, j]|, j = 1 .. 3) = [0.288956; 0.745536; 0.64728]
sum(|A3[i, j]|, i = 1 .. 3) = [0.765072; 0.249937; 0.666762]
sum(A3[i, j]^2, i = 1 .. 3) = [0.344867; 0.0321829; 0.29538]
i := 1 .. 3
F3[i] := -A3[i, 4]
F3 = [0.750378; -0.404018; 1.30769]
res(e) :=
    k ← 0
    X0 ← F3
    for i ∈ 1 .. 3
        X1[i] ← sum((A3[i, j]*X0[j]) + F3[i], j = 1 .. 3)
    while ((|X0[1] - X1[1]| > e) and (|X0[2] - X1[2]| > e) and (|X0[3] - X1[3]| > e))
        X0 ← X1
        for i ∈ 1 .. 3
            X1 ← sum((A3[i, j]*X0[j]) + F3[i], j = 1 .. 3)
        k ← k + 1
    [X1[1]; X1[2]; X1[3]; k]
res(0.00001) =  # error: This value must be a vector.
