# Лабортаторная работа №3
# Тема: Решение алгебраических и транцендентных уравнений методом итерации.
# Цель: Получить практические навыки решения алгебраических и транцендентных уравнений методом итерации.
# Выполнил студент группы 316ст
# Волковский В.В.
# Вариант №4
# Решим уравнение 0.973*e^(-0.51*x) - x
F(x) := 0.973*e^(-0.51*x) - x
Φ(x, λ) := x - λ*F(x)
d/dx(x - λ*F(x)) → λ*(0.49623*e^(-0.51*x) + 1) + 1
# Ищем λ, при котором |Φ(x,λ)|<1, решаем неравенство относительно λ
x := 0.4, 0.8 .. 2
|1 - λ*(1.0/x - 8.59)| < 1 solve, λ → [
    -0.328407224959 < λ < 0.0;
    -0.272479564033 < λ < 0.0;
    -0.257842715943 < λ < 0.0;
    -0.251098556183 < λ < 0.0;
    -0.247218788628 < λ < 0.0
]
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# Графическое решение уравнения
# Исследуем промежутки на корень: перемену знака F(x), знак первой производной.
# Подбираем наименьшее знчение λ.
λ := -0.2
x = [0.4; 0.8; 1.2; 1.6; 2]
F(x) = [0.393445; -0.152976; -0.672376; -1.16974; -1.64914]
d/dx(F(x)) = [-1.40466; -1.32998; -1.26909; -1.21943; -1.17894]
|d/dx(Φ(x, λ))| = [0.719069; 0.734004; 0.746182; 0.756114; 0.764212]
res(a, ε) :=
    x0 ← a
    x1 ← Φ(x0, λ)
    i ← 0
    while |x0 - x1| > ε
        x0 ← x1
        x1 ← Φ(x0, λ)
        i ← i + 1
    [x1; i]
F(0.68582) = 4.66057e-7
res(0.4, 0.00000001) = [0.68582; 51]
# Корень х=0.68582 | нашли на 51 шаге итеррации
