# Лабораторная работа №5
# Тема: Решение систем линейных уравнений. Метод Гаусса
# Метод единственного деления
# Цель: решить систему линейных уравнений методом Гаусса.
# Вычислить определитель матрицы и коэффициенты
# Выполнил студент группы 316ст
# Волковский Виталий
# Вриант №4
det([6.62, 2.65, 2.45; 5.21, 0.21, 2.13; 1.15, 4.21, 1.75]) = -21.454  # не равен нулю
ORIGIN ≡ 1
Gauss(a, n, m) :=
    i ← 1
    while i ≤ n
        j ← 1
        koef ← a[i, i]
        while j ≤ m
            a[i, j] ← a[i, j]/koef
            j ← j + 1
        j ← i + 1
        while j ≤ n
            koef ← a[j, i]
            k ← 1
            while k ≤ m
                a[j, k] ← a[j, k] - a[i, k]*koef
                k ← k + 1
            j ← j + 1
        i ← i + 1
    x ← [0; 0; 0]
    for i ∈ n .. 1
        x[i] ← a[i, m] - sum(a[i, j]*x[j], j = m - 2 .. n)
    x
a := [6.62, 2.65, 2.45, 2.57; 5.21, 0.21, 2.13, 2.17; 1.15, 4.21, 1.75, -1.90]
Gauss(a, 3, 4) = [0.910291; -0.206363; -1.18746]
x := [6.62, 2.65, 2.45; 5.21, 0.21, 2.13; 1.15, 4.21, 1.75]^-1*[2.57; 2.17; -1.90] = [0.910291; -0.206363; -1.18746]
[6.62, 2.65, 2.45; 5.21, 0.21, 2.13; 1.15, 4.21, 1.75]^-1 = [0.400848, -0.264613, -0.239116; 0.310804, -0.408665, 0.0622774; -1.01112, 1.15702, 0.57874]
[6.62, 2.65, 2.45; 5.21, 0.21, 2.13; 1.15, 4.21, 1.75]^-1*[6.62, 2.65, 2.45; 5.21, 0.21, 2.13; 1.15, 4.21, 1.75] = [1, 0, 0; 0, 1, 0; 0, 0, 1]
# Вывод: во время выполнения данной лабораторной работы я научился решать системы линейных урвнений методом Гауса. Нашел корени: [0.91; -0.206; -1.187]
