# Лабораторная работа №6
# Тема: Итеррационные методы решения систем линейных алгебраических уравнений. Метод простой итерации. Метод
# Цель: Изучить методы программирования матриц
# Выполнил студент группы 316ст
# Волковский Виталий
# Вриант №4
ORIGIN ≡ 1
i := 1 .. 3
j := 1 .. 3
A1 := [6.62, 2.65, 2.45, 2.57; 5.21, 0.21, 2.13, 2.17; 1.15, 4.21, 1.75, -1.90]
F[i] := A1[i, 4]
F = [2.57; 2.17; -1.9]
A[i, j] := A1[i, j]
A = [6.62, 2.65, 2.45; 5.21, 0.21, 2.13; 1.15, 4.21, 1.75]
X := A^-1*F
X = [0.910291; -0.206363; -1.18746]
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j := 1 .. 4
A[1, j] := A1[1, j] - A1[3, j]
A[2, j] := A1[2, j] - A1[1, j]
A[3, j] := (6*A1)[1, j] - (8*A1)[2, j] - (4*A1)[3, j]
A = [5.47, -1.56, 0.7, 4.47; -1.41, -2.44, -0.32, -0.4; -6.56, -2.62, -9.34, 5.66]
A2 := A
A2 = [5.47, -1.56, 0.7, 4.47; -1.41, -2.44, -0.32, -0.4; -6.56, -2.62, -9.34, 5.66]
j := 1 .. 4
A3[i, j] := -A2[i, j]/A2[i, i]
A3 = [
    -1, 0.285192, -0.127971, -0.817185;
    -0.577869, -1, -0.131148, -0.163934;
    -0.702355, -0.280514, -1, 0.605996
]
j := 1 .. 3
F3[i] := -A3[i, 4]
i := 1 .. 3
A3[i, i] := 0
A3 = [
    0, 0.285192, -0.127971, -0.817185;
    -0.577869, 0, -0.131148, -0.163934;
    -0.702355, -0.280514, 0, 0.605996
]
F3 = [0.817185; 0.163934; -0.605996]
sum(|A3[i, j]|, j = 1 .. 3) = [0.413163; 0.709016; 0.982869]
sum(|A3[i, j]|, i = 1 .. 3) = [1.28022; 0.565706; 0.259118]
sum(A3[i, j]^2, i = 1 .. 3) = [0.827236; 0.160023; 0.0335762]
# Проверка достаточного условия сходимости метода простой итерации: каждая из трех сумм по модулю <1
res(ε) :=
    k ← 0
    X0 ← F3
    for i ∈ 1 .. 3
        X1[i] ← sum(A3[i, j]*X0[j], j = 1 .. 3) + F3[i]
    while (|X0[1] - X1[1]| > ε) and (|X0[2] - X1[2]| > ε) and (|X0[3] - X1[3]| > ε)
        X0 ← X1
        for i ∈ 1 .. 3
            X1[i] ← sum(A3[i, j]*X0[j], j = 1 .. 3) + F3[i]
        k ← k + 1
    [X1[1]; X1[2]; X1[3]; k]
res(0.000000001) = [0.910291; -0.206363; -1.18746; 13]
# Метод Зейделя
res1(ε) :=
    k ← 0
    X0 ← F3
    for i ∈ 1 .. 3
        X1[i] ← sum(A3[i, j]*X0[j], j = 1 .. 3) + F3[i]
    X1[2] ← A3[2, 1]*X1[1] + A3[2, 3]*X0[3] + F3[2]
    X1[3] ← A3[3, 1]*X1[1] + A3[3, 2]*X1[2] + F3[3]
    while (|X0[1] - X1[1]| > ε) and (|X0[2] - X1[2]| > ε) and (|X0[3] - X1[3]| > ε)
        X0 ← X1
        for i ∈ 1 .. 3
            X1[i] ← sum(A3[i, j]*X0[j], j = 1 .. 3) + F3[i]
        X1[2] ← A3[2, 1]*X1[1] + A3[2, 3]*X0[3] + F3[2]
        X1[3] ← A3[3, 1]*X1[1] + A3[3, 2]*X1[2] + F3[3]
        k ← k + 1
    [X1[1]; X1[2]; X1[3]; k]
res1(0.000000001) = [0.910291; -0.206363; -1.18746; 12]
# Вывод: Изучил методы программирования матриц. При помощи метода простой итерации, а также метода Зейделя.
