# Лабораторная работа №7
# Тема: Интерполяционный многочлен Лагранжа
# Цель: Изучить методы интерполяции
# Выполнил студент группы 316ст
# Волковский Виталий
n := 3
i := 0 .. 3
x := [1.2; 1.6; 2.1; 2.6]
f := [0.1823; 0.4700; 0.7419; 1.6864]
j := 0 .. 3
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k := [
    f[0]/((x[0] - x[1])*(x[0] - x[2])*(x[0] - x[3]));
    f[1]/((x[1] - x[0])*(x[1] - x[2])*(x[1] - x[3]));
    f[2]/((x[2] - x[0])*(x[2] - x[1])*(x[2] - x[3]));
    f[3]/((x[3] - x[0])*(x[3] - x[1])*(x[3] - x[2]))
]
k1 :=
    for i ∈ 0 .. 3
        zn ← 1
        for j ∈ 0 .. 3
            zn ← zn*(x[i] - x[j]) if i ≠ j
        K[i] ← f[i]/zn
    K
k = [-0.361706; 2.35; -3.29733; 2.40914]
k1 = [-0.361706; 2.35; -3.29733; 2.40914]
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P3(X) := k[0]*product(X - x[i], i = 1 .. n) + k[n]*product(X - x[i], i = 0 .. n - 1) + sum(k[i]*(product((X - x[j]), j = 0 .. i - 1)*product(X - x[j], j = i + 1 .. n)), i = 1 .. n - 1)
P3(X) collect, X → 1.1001031746*X^3 - 5.58545*X^2 + 9.84589920635*X - 5.49070933333
Lagr(X, x, f, n) := sum(f[i]*product({
    1 if i == j
    (X - x[j])/(x[i] - x[j]) otherwise
}, j = 0 .. n), i = 0 .. n)
Lagr(x[i], x, f, 3) = [0.1823; 0.47; 0.7419; 1.6864]
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# График совпадения функций f,P3 и Lagr
# Условия P3(Xi)=f(Xi) выполняются, сливаются на графике в одну линию. Используя полученный интерполяционный многочлен Ла Гранжа Р3(Х) получим значения f в любых других точках х, расположенных посередине
i := 0 .. 2
P3(x[i]) = [0.1823; 0.47; 0.7419]
Lagr(x[i], x, f, 3) = [0.1823; 0.47; 0.7419]
(x[i] + x[i + 1])/2 = [1.4; 1.85; 2.35]
P3((x[i] + x[i + 1])/2) = [0.364751; 0.573442; 1.07851]
# Узлы Чебышева
D(x) := 2/(3 + (x + 1)^3)
n := 10
i := 0 .. n
x[i] := -1 + 0.2*i
f[i] := D(x[i])
xcheb[i] := cos((2*i + 1)*π/(2*n + 2))
fc[i] := D(xcheb[i])
x = [-1; -0.8; -0.6; -0.4; -0.2; 0; 0.2; 0.4; 0.6; 0.8; 1]
f = [0.666667; 0.664894; 0.652742; 0.621891; 0.569476; 0.5; 0.423012; 0.348189; 0.281849; 0.226449; 0.181818]
xcheb = [0.989821; 0.909632; 0.75575; 0.540641; 0.281733; 0; -0.281733; -0.540641; -0.75575; -0.909632; -0.989821]
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Lagr(x[i], x, f, 10) = [0.666667; 0.664894; 0.652742; 0.621891; 0.569476; 0.5; 0.423012; 0.348189; 0.281849; 0.226449; 0.181818]
Lagr(xcheb[i], xcheb, fc, 10) = [0.183849; 0.200726; 0.237745; 0.300444; 0.391721; 0.5; 0.593373; 0.645801; 0.663444; 0.666503; 0.666666]
# Погрешность интерполирования
nn := 4
k := 0 .. nn
M(x) := d^(nn + 1)/dx^(nn + 1)(D(x))
MM[k] := M(x[k])
x[k] = [-1; -0.8; -0.6; -0.4; -0.2]
MM = [0; 10.0792; 12.9599; 0.580977; -16.0084]
max(|MM|) = 22.9381
R(X) := |product(X - x[k], k)*max(|MM|)/(nn + 1)!|
R(-0.99) = 6.60198e-5
