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f(x) := 2*x^5 + 4*x - 3
polyroots([-3; 4; 0; 0; 0; 2]) = [-0.985147 - 0.865542i; -0.985147 + 0.865542i; 0.646027 - 0.932045i; 0.646027 + 0.932045i; 0.67824]
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x := 0, 0.2 .. 1
d^2/dx^2(f(x)) = [0; 0.32; 2.56; 8.64; 20.48; 40]
x = [0; 0.2; 0.4; 0.6; 0.8; 1]
f(x) = [-3; -2.19936; -1.37952; -0.44448; 0.85536; 3]
d/dx(f(x)) = [4; 4.016; 4.256; 5.296; 8.096; 14]
# Необходимые и достаточные условия существования корней выполняются
# i - счетчик шагов итерации
res(a, b, ε) :=
    i ← 0
    while |a - b| > ε
        c ← (a + b)/2
        i ← i + 1
        a ← c if f(a)*f(c) > 0
        b ← c if f(b)*f(c) > 0
        break if f(c) == 0
    [c; i]
res(0, 1, 0.0000001) = [0.67824; 24]
polyroots([-3; 4; 0; 0; 0; 2]) = [-0.985147 - 0.865542i; -0.985147 + 0.865542i; 0.646027 - 0.932045i; 0.646027 + 0.932045i; 0.67824]
# Нашли 3 корня для данного ε=0,000000 х1=0.67824 на 24 шаге
# Вывод: на лабораторной работе я научился решать алгебраические и трансцендентные уравнения в среде MathCad
