a := 0
b := 1.2
f(x) := (3.5*x^2 + x)/(x^4 + 2)
I := integral(f(x), x = a .. b)
I = 1.01161  # Метод левых прямоугольников
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left(a, b, n) :=
    h ← (b - a)/n
    I ← h*sum(f(a + i*h), i = 0 .. n - 1)
    I
left(a, b, 20) = 0.96542
left(a, b, 10) = 0.91875
I1 := left(a, b, 20)
I2 := left(a, b, 10)
Rleft := |I1 - I2|
Rleft = 0.0466702
# Метод правых прямоугольников
right(a, b, n) :=
    h ← (b - a)/n
    I ← h*sum(f(a + i*h), i = 1 .. n)
    I
right(a, b, 20) = 1.05733
right(a, b, 10) = 1.10257
I1 := right(a, b, 20)
I2 := right(a, b, 10)
Rright := |I1 - I2|
# Метод средних прямоугольников
Rright = 0.0452387
middle(a, b, n) :=
    h ← (b - a)/n
    I ← h*sum(f(a + (2*i - 1)*h/2), i = 1 .. n)
    I
middle(a, b, 20) = 1.01173
middle(a, b, 10) = 1.01209
I1 := middle(a, b, 20)
I2 := middle(a, b, 10)
Rmiddle := |I1 - I2|
Rmiddle = 0.000359131
# Метод трапеции
trap(a, b, n) :=
    h ← (b - a)/n
    I ← h/2*(f(a) + 2*sum(f(a + i*h), i = 1 .. n - 1) + f(b))
    I
trap(a, b, 20) = 1.01137
trap(a, b, 10) = 1.01066
I1 := trap(a, b, 20)
I2 := trap(a, b, 10)
Rtrap := |I1 - I2|/3
Rtrap = 0.000238589
# Метод Симпсона
simp(a, b, n) :=
    h ← (b - a)/n
    I ← h/3*(f(a) + 2*sum(f(a + 2*i*h), i = 1 .. (n - 2)/2) + 4*sum(f(a + h*(2*i - 1)), i = 1 .. n/2) + f(b))
    I
I1 := simp(a, b, 20)
I2 := simp(a, b, 10)
simp(a, b, 20) = 1.01161
simp(a, b, 10) = 1.01163
Rsimp := |I1 - I2|/15
Rsimp = 9.19741e-7
