# Лабортаторная работа №3
# Тема: Решение алгебраических и транцендентных уравнений методом итерации.
# Цель: Получить практические навыки решения алгебраических и транцендентных уравнений методом итерации.
# Выполнила студента группы 316ст
# Ганюшкина Ярина
# Вариант №2
F(x) := 7.67*sin(6.0*x) - 7.25*x
Φ(x, λ) := x - λ*F(x)
d/dx(x - λ*F(x)) → 1 - λ*(46.02*cos(6.0*x) - 7.25)
# Ищем λ, при котором |Φ(x,λ)|<1, решаем неравенство относительно λ
x := 0.4, 0.5 .. 0.8
|1 - λ*(46.02*cos(6.0*x) - 7.25)| < 1 solve, λ → [
    -500000000000000000/10296214697302029473 < λ < 0;
    -5000000000000000000/132023636733881249859 < λ < 0;
    -10000000000000000000/242594111598487226051 < λ < 0;
    -20000000000000000000/298118029980989945637 < λ < 0;
    -50000000000000000000/80582419552916721997 < λ < 0
]
# Графическое решение уравнения
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λ := -0.03
# Исследуем промежутки на корень: перемену знака F(x), знак первой производной.
# Подбираем наименьшее знчение λ.
d/dx(F(x)) = [-41.1849; -52.8095; -48.5188; -29.8118; -3.2233]
|d/dx(Φ(x, λ))| = [0.235546; 0.584284; 0.455565; 0.105646; 0.903301]
x = [0.4; 0.5; 0.6; 0.7; 0.8]
F(x) = [2.2808; -2.54261; -7.74413; -11.76; -13.4406]
res(a, ε) :=
    x0 ← a
    x1 ← Φ(x0, λ)
    i ← 0
    while |x0 - x1| > ε
        x0 ← x1
        x1 ← Φ(x0, λ)
        i ← i + 1
    [x1; i]
res(0.4, 0.00000001) = [0.450317; 21]
F(0.45032) = -0.00013608
# Корень х=0.45032 | нашли на 21 шаге итеррации
