# Лабораторная работа №5
# Тема: Итеррационные методы решения систем линейных алгебраических уравнений. Метод простой итерации.
# Цель: Изучить методы программирования матриц
# Выполнила студентка группы 316ст
# Ганюшкина Ярина
ORIGIN ≡ 1
i := 1 .. 3
j := 1 .. 3
A1 := [2.00, 2.60, 1.93, 2.15; 3.45, 0.58, 1.21, 1.55; 1.25, 4.21, 1.95, 2.10]
F[i] := A1[i, 4]
F = [2.15; 1.55; 2.1]
A[i, j] := A1[i, j]
X := A^-1*F
X = [0.0914773; -0.00112183; 1.02071]
A = [2, 2.6, 1.93; 3.45, 0.58, 1.21; 1.25, 4.21, 1.95]
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j := 1 .. 4
A[1, j] := (2*A1)[2, j] + A1[1, j]
A[3, j] := A1[3, j] + A1[2, j] - A1[1, j]
A[2, j] := A1[2, j] - A1[3, j]
A = [8.9, 3.76, 4.35, 5.25; 2.2, -3.63, -0.74, -0.55; 2.7, 2.19, 1.23, 1.5]
A2 := A
A2 = [8.9, 3.76, 4.35, 5.25; 2.2, -3.63, -0.74, -0.55; 2.7, 2.19, 1.23, 1.5]
j := 1 .. 4
A3[i, j] := -A2[i, j]/A2[i, i]
A3 = [
    -1, -0.422472, -0.488764, -0.589888;
    0.606061, -1, -0.203857, -0.151515;
    -2.19512, -1.78049, -1, -1.21951
]
j := 1 .. 3
A3[i, i] := 0
A3 = [
    0, -0.422472, -0.488764, -0.589888;
    0.606061, 0, -0.203857, -0.151515;
    -2.19512, -1.78049, 0, -1.21951
]
i := 1 .. 3
F3[i] := -A3[i, 4]
F3 = [0.589888; 0.151515; 1.21951]
sum(|A3[i, j]|, j = 1 .. 3) = [0.911236; 0.809917; 3.97561]
sum(|A3[i, j]|, i = 1 .. 3) = [2.80118; 2.20296; 0.692621]
sum(A3[i, j]^2, i = 1 .. 3) = [5.18587; 3.34862; 0.280448]
# Проверка достаточного условия сходимости метода простой итерации: каждая из трех сумм по модулю <1
res(ε) :=
    k ← 0
    X0 ← F3
    for i ∈ 1 .. 3
        X1[i] ← sum(A3[i, j]*X0[j], j = 1 .. 3) + F3[i]
    while (|X0[1] - X1[1]| > ε) and (|X0[2] - X1[2]| > ε) and (|X0[3] - X1[3]| > ε)
        X0 ← X1
        for i ∈ 1 .. 3
            X1[i] ← sum((A3[i, j]*X0[j]), j = 1 .. 3) + F3[i]
        k ← k + 1
    [X1[1]; X1[2]; X1[3]; k]
X = [0.0914773; -0.00112183; 1.02071]
res(0.000000000000000000001) =  # error: Encountered a floating point error.
# Метод Зейделя
res1(ε) :=
    k ← 0
    X0 ← F3
    X1[1] ← sum((A3[1, j]*X0[j]), j = 1 .. 3) + F3[1]
    X1[2] ← A3[2, 1]*X1[1] + A3[2, 3]*X0[3] + F3[2]
    X1[3] ← A3[3, 1]*X1[1] + A3[3, 2]*X1[2] + F3[3]
    while (|X0[1] - X1[1]| > ε) and (|X0[2] - X1[2]| > ε) and (|X0[3] - X1[3]| > ε)
        X0 ← X1
        X1[1] ← sum((A3[1, j]*X0[j]), j = 1 .. 3) + F3[1]
        X1[2] ← A3[2, 1]*X1[1] + A3[2, 3]*X0[3] + F3[2]
        X1[3] ← A3[3, 1]*X1[1] + A3[3, 2]*X1[2] + F3[3]
        k ← k + 1
    [X1[1]; X1[2]; X1[3]; k]
res1(0.000000000000000000001) =  # error
X = [0.0914773; -0.00112183; 1.02071]
