# Лабораторная работа №7
# Тема: Интерполяционный метод Лагранжа
# Цель: научиться находить внутрение значения функций.
# Выполнила студентка группы 316ст
# Ганюшкина Ярина
# Вриант №5
# исходная функция f задана таблично
x := [2.2; 2.7; 3.1; 3.6]
f := [0.7885; 0.9933; 1.1314; 1.2909]
# Получим многочлен Лагранжа
# Р3(х) для функции f
n := 3
k :=
    for i ∈ 0 .. n
        zn ← 1
        for j ∈ 0 .. n
            zn ← zn*(x[i] - x[j]) if i ≠ j
        K[i] ← f[i]/zn
    K
k = [-1.25159; 5.51833; -6.28556; 2.04905]
P3(X) := k[0]*product(X - x[i], i = 1 .. n) + k[n]*product(X - x[i], i = 0 .. n - 1) + sum(k[i]*(product(X - x[j], j = 0 .. i - 1)*product(X - x[j], j = i + 1 .. n)), i = 1 .. n - 1)
P3(X) collect, X → 0.0302380952381*X^3 - 0.313404761905*X^2 + 1.39888095238*X - 1.09413428571
Lagr(X, x, f, n) := sum(f[i]*product({
    1 if (i == j)
    (X - x[j])/(x[i] - x[j]) otherwise
}, j = 0 .. n), i = 0 .. n)
i := 0 .. 3
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# Условия Р3(Хi)=f(Xi) выполняются, это видно на графике, где f и Р3(xi) сливаются в одну линию. Используя полученный интерполяционный многочлен Лагранжа Р3(Х) получим значения f в любых других точках х, расположенных посредине
i := 0 .. 2
P3((x[i] + x[i + 1])/2) = [0.896597; 1.06436; 1.21174]
(x[i] + x[i + 1])/2 = [2.45; 2.9; 3.35]
i := 0 .. 3
P3(x[i]) = [0.7885; 0.9933; 1.1314; 1.2909]
Lagr(x[i], x, f, 3) = [0.7885; 0.9933; 1.1314; 1.2909]
# Пример использования узлов Чебышева
# на промежутке [-1;1]
# узлы сетки с шагом 0.2
n := 10
i := 0 .. n
x[i] := -1 + 0.2*i
F(x) := (3.5*x^2 + x)/(x^4 + 2)
f[i] := F(x[i])
xcheb[i] := cos((2*i + 1)*π/(2*n + 2))
fc[i] := F(xcheb[i])
fc = [1.49293; 1.41756; 1.18424; 0.749803; 0.278891; 0; -0.00195696; 0.23131; 0.534473; 0.739903; 0.824112]
x = [-1; -0.8; -0.6; -0.4; -0.2; 0; 0.2; 0.4; 0.6; 0.8; 1]
f = [0.833333; 0.59761; 0.309917; 0.0789889; -0.029976; 0; 0.169864; 0.473934; 0.873403; 1.26162; 1.5]
xcheb = [0.989821; 0.909632; 0.75575; 0.540641; 0.281733; 0; -0.281733; -0.540641; -0.75575; -0.909632; -0.989821]
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Lagr(x[i], x, f, 10) = [0.833333; 0.59761; 0.309917; 0.0789889; -0.029976; 0; 0.169864; 0.473934; 0.873403; 1.26162; 1.5]
Lagr(xcheb[i], xcheb, fc, 10) = [1.49293; 1.41756; 1.18424; 0.749803; 0.278891; 0; -0.00195696; 0.23131; 0.534473; 0.739903; 0.824112]
# Погрешность интерполирования
nn := 4
k := 0 .. nn
M(x) := d^(nn + 1)/dx^(nn + 1)(F(x))
MM[k] := M(x[k])
x[k] = [-1; -0.8; -0.6; -0.4; -0.2]
max(|MM|) = 461.211
MM = [53.9918; -398.142; -148.769; 142.007; 94.7926]
R(X) := |product(X - x[k], k)*max(|MM|)/(nn + 1)!|
R(-0.99) = 0.00132744
