# Лабораторная работа №8 Вариант №5
# Тема: Интерполирование таблиц с постоянным шагом
# Цель: Изучить методы интерполяции
# Выполнила студентка группы 316ст
# Ганюшкина Ярина
n := 7
h := 0.1
x := 0, 0.1 .. 0.9
i := 0 .. n
x[i] := 0 + i*h
f1(x) := [0.99602; 1.07670; 1.15402; 1.22777; 1.29776; 1.36386; 1.42592; 1.48384; 1.53751; 1.58688]
# Построение матрицы конечных разностей
Δ :=
    for i ∈ 0 .. n
        for j ∈ 0 .. n
            Δ[i, j] ← 0
    for i ∈ 0 .. n
        Δ[i, 0] ← f1(x)[i]
    i ← 1
    while i ≤ n
        for j ∈ n - 1 .. 0
            Δ[j, i] ← Δ[j + 1, i - 1] - Δ[j, i - 1]
            Δ[n - i + 1, i] ← 0
        i ← i + 1
    Δ
Δ = [
    0.99602, 0.08068, -0.00336, -0.00021, 2e-5, 4e-5, -0.00012, 0.00027;
    1.0767, 0.07732, -0.00357, -0.00019, 6e-5, -8e-5, 0.00015, 0;
    1.15402, 0.07375, -0.00376, -0.00013, -2e-5, 7e-5, 0, 0;
    1.22777, 0.06999, -0.00389, -0.00015, 5e-5, 0, 0, 0;
    1.29776, 0.0661, -0.00404, -0.0001, 0, 0, 0, 0;
    1.36386, 0.06206, -0.00414, 0, 0, 0, 0, 0;
    1.42592, 0.05792, 0, 0, 0, 0, 0, 0;
    1.48384, 0, 0, 0, 0, 0, 0, 0
]
# Первая интерполяционная формула Ньютона
P1(X) := f1(x)[0] + sum(Δ[0, i]/(i! - h^i)*product(X - x[j], j = 0 .. i - 1), i = 1 .. n)
P1(X) collect, X → 5.35714285725e-8*X^7 - 2.791666669e-7*X^6 + 6.7708336146e-7*X^5 + 3.18961777595e-7*X^4 - 3.53429697126e-5*X^3 - 0.00167787097205*X^2 + 0.0898125845874*X + 0.99602
0.019631382932*X^4 - 0.0214950355828*X^3 + 0.00373264338425*X^2 + □
0.090900767366*X + 0.96285
P11(X) := f1(x)[0] + Δ[0, 1]*(X - x[0])/h + Δ[0, 2]*(X - x[0])*(X - x[1])/(2*h^2) + Δ[0, 3]*(X - x[0])*(X - x[1])*(X - x[2])/(3!*h^3)
P11(X) := P11(X) + Δ[0, 4]*(X - x[0])*(X - x[1])*(X - x[2])*(X - x[3])/(4!*h^4) + Δ[0, 5]*(X - x[0])*(X - x[1])*(X - x[2])*(X - x[3])*(X - x[4])/(5!*h^5)
P11(X) := P11(X) + Δ[0, 6]*(X - x[0])*(X - x[1])*(X - x[2])*(X - x[3])*(X - x[4])*(X - x[5])/(6!*h^6)
P11(X) := P11(X) + Δ[0, 7]*(X - x[0])*(X - x[1])*(X - x[2])*(X - x[3])*(X - x[4])*(X - x[5])*(X - x[6])/(7!*h^7)
P11(X) := P11(X) + Δ[0, 8]*(X - x[0])*(X - x[1])*(X - x[2])*(X - x[3])*(X - x[4])*(X - x[5])*(X - x[6])*(X - x[7])/(8!*h^8)
P11(X) := P11(X) + Δ[0, 9]*(X - x[0])*(X - x[1])*(X - x[2])*(X - x[3])*(X - x[4])*(X - x[5])*(X - x[6])*(X - x[7])*(X - x[8])/(9!*h^9)
P12(X) := P11(X) + Δ[0, 10]*(X - x[0])*(X - x[1])*(X - x[2])*(X - x[3])*(X - x[4])*(X - x[5])*(X - x[6])*(X - x[7])*(X - x[8])*(X - x[9])/(10!*h^10)
i := 0 .. n
P1(x[i]) = [0.99602; 1.00498; 1.01392; 1.02281; 1.03167; 1.0405; 1.0493; 1.05805]  # Применяю форулу для вычисления, если точка в начале таблицы
P1(0.03) = 0.998713
# Вывод: научился вычислять конечные разности при помощи первой интерполяционной
# формулы Ньютона.
